// SBML level 2 version 3

model temp()

  // Compartments:
  compartment cell = 1;

  // Species:
  species Ras_a_0_sos in cell = RasTotal; Ras_a_0_sos is "Ras(a~0,sos)";
  species Ras_a_0_sos_1_Sos_ras_1 in cell = 0; Ras_a_0_sos_1_Sos_ras_1 is "Ras(a~0,sos!1).Sos(ras!1)";
  species Ras_a_p_sos in cell = 0; Ras_a_p_sos is "Ras(a~p,sos)";
  species Ras_a_p_sos_1_Sos_ras_1 in cell = 0; Ras_a_p_sos_1_Sos_ras_1 is "Ras(a~p,sos!1).Sos(ras!1)";

  // Parameters:
  RhoSOS = 10;
  Koff1 = 0.005;
  Koff2 = 0.0005;
  A = 1;
  Kcat2 = 0.0025;
  Kon1 = 7e-8*RhoSOS;
  Kon2 = 7e-8*RhoSOS;
  RasTotal = 1000*A;

  // Assignment rules:
  boundRasGTP := 0 + Ras_a_p_sos_1_Sos_ras_1;
  boundRasGDP := 0 + Ras_a_0_sos_1_Sos_ras_1;
  totalBoundRas := Ras_a_0_sos_1_Sos_ras_1 + Ras_a_p_sos_1_Sos_ras_1;
  unboundRasGTP := 0 + Ras_a_p_sos;
  unboundRasGDP := 0 + Ras_a_0_sos;
  totalRasGTP := Ras_a_p_sos + Ras_a_p_sos_1_Sos_ras_1;
  TotalRas := Ras_a_0_sos + Ras_a_0_sos_1_Sos_ras_1 + Ras_a_p_sos + Ras_a_p_sos_1_Sos_ras_1;
  Kcat1 := 1e-2/A;
  activatedRasGTP := totalRasGTP/TotalRas;

  // Reactions:
  R1: Ras_a_0_sos => Ras_a_0_sos_1_Sos_ras_1; Kon1*Ras_a_0_sos;
  R2: Ras_a_0_sos + Ras_a_0_sos_1_Sos_ras_1 => Ras_a_0_sos_1_Sos_ras_1 + Ras_a_p_sos; Kcat1*Ras_a_0_sos*Ras_a_0_sos_1_Sos_ras_1;
  R3: Ras_a_0_sos_1_Sos_ras_1 => Ras_a_0_sos; Koff1*Ras_a_0_sos_1_Sos_ras_1;
  R4: Ras_a_p_sos => Ras_a_0_sos; Kcat2*Ras_a_p_sos;
  R5: Ras_a_p_sos => Ras_a_p_sos_1_Sos_ras_1; Kon2*Ras_a_p_sos;
  R6: Ras_a_0_sos + Ras_a_p_sos_1_Sos_ras_1 => Ras_a_p_sos + Ras_a_p_sos_1_Sos_ras_1; Kcat1*Ras_a_0_sos*Ras_a_p_sos_1_Sos_ras_1;
  R7: Ras_a_p_sos_1_Sos_ras_1 => Ras_a_p_sos; Koff2*Ras_a_p_sos_1_Sos_ras_1;

  // Unit definitions:
  unit substance = item;
end
